*HEADING
cubit(./PlanarCapacitor2D.inp): 10/12/2023: 09:26:25
version: 2022.11
**
********************************** P A R T S **********************************
*PART, NAME=Part-Default
**
********************************** N O D E S **********************************
*NODE, NSET=ALLNODES
       1,    0.000000e+00,    1.000000e-01
       2,   -1.000000e-01,    1.000000e-01
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**
********************************** E L E M E N T S ****************************
*ELEMENT, TYPE=STRI3, ELSET=LeftSide
     235,       9,      73,       8
     236,      74,      73,       9
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*ELEMENT, TYPE=STRI3, ELSET=RightSide
       1,      37,      38,     169
       2,      35,      36,     170
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**
********************************** S I D E S E T S **********************************
*ELSET, ELSET=LeftPlate_E1
     239
*ELSET, ELSET=LeftPlate_E2
     251,     253,     255,     258,     261,     265,     271,     274,     276,     288,
     289
*ELSET, ELSET=LeftPlate_E3
     245,     249,     250
*SURFACE, NAME=LeftPlate
LeftPlate_E1, E1
LeftPlate_E2, E2
LeftPlate_E3, E3
*ELSET, ELSET=RightPlate_E1
      12,      23,      37,      38,      45,      53,      54,      60,      62,      67,
      72,      82,      85,      96
*ELSET, ELSET=RightPlate_E3
       7
*SURFACE, NAME=RightPlate
RightPlate_E1, E1
RightPlate_E3, E3
**
********************************** P R O P E R T I E S ************************
*SHELL SECTION, ELSET=LeftSide, SECTION INTEGRATION=SIMPSON, MATERIAL=Default-Steel
1.000000e+00
*SHELL SECTION, ELSET=RightSide, SECTION INTEGRATION=SIMPSON, MATERIAL=Default-Steel
1.000000e+00
**
*END PART
**
**
**
********************************** E N D   P A R T S **********************************
**
**
********************************** A S S E M B L Y ************************************
**
*ASSEMBLY, NAME=ASSEMBLY1
**
*INSTANCE, NAME=Part-Default_1, PART=Part-Default
*END INSTANCE
**
*END ASSEMBLY
**
**
**
*MATERIAL, NAME = Default-Steel
*ELASTIC, TYPE=ISOTROPIC
2.068000e+05, 2.900000e-01
*DENSITY
7.000000e-06
*CONDUCTIVITY,TYPE=ISO
4.500000e-02
*SPECIFIC HEAT
5.000000e+02
**
**
************************************** H I S T O R Y *************************************
**
*PREPRINT
**
**************************************** S T E P 1 ***************************************
*STEP,INC=100,NAME=Default Set
**
*STATIC
1, 1, 1e-05, 1
**
**
**
**
*END STEP
