*HEADING
cubit(./PlanarCapacitor3D.inp): 10/12/2023: 10:37:43
version: 2022.11
**
********************************** P A R T S **********************************
*PART, NAME=Part-Default
**
********************************** N O D E S **********************************
*NODE, NSET=ALLNODES
       1,    0.000000e+00,   -5.000000e-01,    5.000000e-01
       2,    0.000000e+00,    5.000000e-01,    5.000000e-01
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**
********************************** E L E M E N T S ****************************
*ELEMENT, TYPE=C3D4, ELSET=LeftSide
       1,      20,       3,      13,       2
       2,      20,      14,      13,       3
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*ELEMENT, TYPE=C3D4, ELSET=RightSide
      26,      18,       9,      13,       1
      27,      21,      24,       2,      10
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**
********************************** S I D E S E T S **********************************
*ELSET, ELSET=LeftPlate_S1
       5,      17
*ELSET, ELSET=LeftPlate_S2
       2,      20
*ELSET, ELSET=LeftPlate_S3
      22,      23
*SURFACE, NAME=LeftPlate
LeftPlate_S1, S1
LeftPlate_S2, S2
LeftPlate_S3, S3
*ELSET, ELSET=RightPlate_S1
      39
*ELSET, ELSET=RightPlate_S2
      27,      31,      40
*ELSET, ELSET=RightPlate_S3
      34
*ELSET, ELSET=RightPlate_S4
      37
*SURFACE, NAME=RightPlate
RightPlate_S1, S1
RightPlate_S2, S2
RightPlate_S3, S3
RightPlate_S4, S4
**
********************************** P R O P E R T I E S ************************
*SOLID SECTION, ELSET=LeftSide, MATERIAL=Default-Steel
*SOLID SECTION, ELSET=RightSide, MATERIAL=Default-Steel
**
*END PART
**
**
**
********************************** E N D   P A R T S **********************************
**
**
********************************** A S S E M B L Y ************************************
**
*ASSEMBLY, NAME=ASSEMBLY1
**
*INSTANCE, NAME=Part-Default_1, PART=Part-Default
*END INSTANCE
**
*END ASSEMBLY
**
**
**
*MATERIAL, NAME = Default-Steel
*ELASTIC, TYPE=ISOTROPIC
2.068000e+05, 2.900000e-01
*DENSITY
7.000000e-06
*CONDUCTIVITY,TYPE=ISO
4.500000e-02
*SPECIFIC HEAT
5.000000e+02
**
**
************************************** H I S T O R Y *************************************
**
*PREPRINT
**
**************************************** S T E P 1 ***************************************
*STEP,INC=100,NAME=Default Set
**
*STATIC
1, 1, 1e-05, 1
**
**
**
**
*END STEP
